// SBML level 3 version 2

model main()

  // Compartments:
  compartment ethiopia = 1 dimensionless;

  // Species:
  species Sus in ethiopia = 510/ethiopia;  // substance in dimensionless
  species Exp_var in ethiopia = 0;  // substance in dimensionless
  species Infc_var in ethiopia = 0;  // substance in dimensionless
  species Rec_var in ethiopia = 0;  // substance in dimensionless
  species Exp_wild in ethiopia = 0;  // substance in dimensionless
  species Infc_wild in ethiopia = I_0;  // substance in dimensionless
  species Rec_wild in ethiopia = 0;  // substance in dimensionless
  species Exp_var_wild in ethiopia = 0;  // substance in dimensionless
  species Infc_var_wild in ethiopia = 0;  // substance in dimensionless
  species Rec_var_wild in ethiopia = 0;  // substance in dimensionless

  // Parameters:
  beta_0 = 0.07048553 dimensionless;
  kappa_inverse = 5.048201 dimensionless;
  I_0 = 0.4613176 dimensionless;
  gamma_inverse = 22.61993 dimensionless;
  t_0 = 270 dimensionless;

  // Reactions:
  infection_var: Exp_var => Infc_var; 1/kappa_inverse*Exp_var;
  recovery_var: Infc_var => Rec_var; 1/gamma_inverse*0.7407407*Infc_var;
  exposure_var: Sus => Exp_var; beta_0*(Infc_var + Infc_var_wild)/(Sus + Exp_var + Infc_var + Rec_var + Exp_wild + Infc_wild + Rec_wild + Exp_var_wild + Infc_var_wild + Rec_var_wild)*Sus;  // modifiers: Infc_var, Rec_var, Infc_wild, Exp_wild, Rec_wild, Infc_var_wild, Exp_var_wild, Rec_var_wild
  infection_wild: Exp_wild => Infc_wild; 1/kappa_inverse*Exp_wild;
  recovery_wild: Infc_wild => Rec_wild; 1/gamma_inverse*1*Infc_wild;
  exposure_wild: Sus => Exp_wild; beta_0*Infc_wild/(Sus + Exp_var + Infc_var + Rec_var + Exp_wild + Infc_wild + Rec_wild + Exp_var_wild + Infc_var_wild + Rec_var_wild)*Sus;  // modifiers: Infc_var, Exp_var, Rec_var, Infc_wild, Rec_wild, Infc_var_wild, Exp_var_wild, Rec_var_wild
  infection_var_wild: Exp_var_wild => Infc_var_wild; 1/kappa_inverse*Exp_var_wild;
  recovery_var_wild: Infc_var_wild => Rec_var_wild; 1/gamma_inverse*0.7407407*Infc_var_wild;
  exposure_var_wild: Rec_wild => Exp_var_wild; beta_0*(Infc_var + Infc_var_wild)/(Sus + Exp_var + Infc_var + Rec_var + Exp_wild + Infc_wild + Rec_wild + Exp_var_wild + Infc_var_wild + Rec_var_wild)*Rec_wild;  // modifiers: Sus, Infc_var, Exp_var, Rec_var, Infc_wild, Exp_wild, Infc_var_wild, Rec_var_wild

  // Events:
  Infc_var_0: at (time >= t_0): Infc_var = 1; Infc_var_0 is "variant appears";
end
